Fri Aug 21 09:46:30 AM UTC 2026
$PROBLEM A: Y = F (scaled prediction)
$INPUT ID TIME AMT DV MDV CMT
$DATA anchor.csv IGNORE=@
$SUBROUTINES ADVAN13 TOL=9
$MODEL
  COMP=(DEPOT, DEFDOSE)
  COMP=(CENTRAL, DEFOBS)
$PK
  KA = THETA(1)*EXP(ETA(1))
  CL = THETA(2)
  V  = THETA(3)
  S2 = V
$DES
  DADT(1) = -KA*A(1)
  DADT(2) =  KA*A(1) - (CL/V)*A(2)
$ERROR
  Y = F*(1 + EPS(1))
$THETA
  1.0 FIX   ; KA
  3.0 FIX   ; CL
  10.0 FIX  ; V   <- the whole point: ratio should be V if A(2) is unscaled
$OMEGA 0 FIX
$SIGMA 0.0001 FIX
$ESTIMATION METHOD=0 MAXEVAL=0 PRINT=1
$TABLE ID TIME CMT DV PRED NOPRINT ONEHEADER NOAPPEND FILE=anchorA.tab

NM-TRAN MESSAGES
 WARNINGS AND ERRORS (IF ANY) FOR PROBLEM    1
 (WARNING  2) NM-TRAN INFERS THAT THE DATA ARE POPULATION.
Note: Analytical 2nd Derivatives are constructed in FSUBS but are never used.
      You may insert $ABBR DERIV2=NO after the first $PROB to save FSUBS construction and compilation time

1NONLINEAR MIXED EFFECTS MODEL PROGRAM (NONMEM) VERSION 7.6.0 (nm760)
 ORIGINALLY DEVELOPED BY STUART BEAL, LEWIS SHEINER, AND ALISON BOECKMANN
 CURRENT DEVELOPERS ARE ROBERT BAUER, ICON DEVELOPMENT SOLUTIONS,
 AND ALISON BOECKMANN. IMPLEMENTATION, EFFICIENCY, AND STANDARDIZATION
 PERFORMED BY NOUS INFOSYSTEMS.
 PROBLEM NO.:         1
 A: Y = F (scaled prediction)
 TOT. NO. OF OBS RECS:        7
 TOT. NO. OF INDIVIDUALS:        1
 GENERAL NONLINEAR KINETICS MODEL WITH STIFF/NONSTIFF EQUATIONS (LSODA, ADVAN13)
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 #TBLN:      1
 #METH: First Order (Evaluation)
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 Elapsed evaluation time in seconds:     0.11
 Elapsed postprocess time in seconds:     0.07

 ********************                             FIRST ORDER (EVALUATION)                           ********************
 #OBJT:**************                       MINIMUM VALUE OF OBJECTIVE FUNCTION                      ********************
 #OBJV:********************************************         69937.345       *********************************************

 ********************                             FIRST ORDER (EVALUATION)                           ********************
 ********************                             FINAL PARAMETER ESTIMATE                           ********************

 THETA - VECTOR OF FIXED EFFECTS PARAMETERS   *********
         TH 1      TH 2      TH 3
         1.00E+00  3.00E+00  1.00E+01

 OMEGA - COV MATRIX FOR RANDOM EFFECTS - ETAS  ********
         ETA1
 ETA1
+        0.00E+00

 SIGMA - COV MATRIX FOR RANDOM EFFECTS - EPSILONS  ****
         EPS1
 EPS1
+        1.00E-04

 OMEGA - CORR MATRIX FOR RANDOM EFFECTS - ETAS  *******
         ETA1
 ETA1
+        0.00E+00

 SIGMA - CORR MATRIX FOR RANDOM EFFECTS - EPSILONS  ***
         EPS1
 EPS1
+        1.00E-02
 Elapsed finaloutput time in seconds:     0.02
 #CPUT: Total CPU Time in Seconds,        0.297
